// COMSOL Multiphysics 6.0.0.318 model "double_dipole_in_waveguide_web - 副本.mph"
// Outline of the model tree

Parameters
  c = 299792458  // light speed in vacuum
  lambda = 660e-9  // wavelength in vacuum
  frequency = c/lambda
  t_pml = 300e-9  // PML thickness
  radius_pml = 400e-9+t_pml  // outer radius of the spherical computational window
  eps_top = 1.33^2  // air (semi-infnite) -- upper cladding
  eps_mid = 2.25  // glass core
  eps_low = 1.55^2  // substrate (semi-infinte) -- lower cladding
  thickness = 200e-9  // the thickness of the glass core layer
  Lx = 350e-9  // box size for Radiation Pattern Calcu
  Ly = 100e-9  // box size for Radiation Pattern Calcu
  Lz = 300e-9  // box size for Radiation Pattern Calcu
  current = 5.1521e-14  // dipole amplitude
  x1 = -50e-9  // x-coordinate of # 1 dipole
  x2 = 50e-9  // x-coordinate of # 2 dipole
  block = 2000e-9  // a box used for constructing the three-layer configuration (see Geometry 1)

Coordinate systems
  pml1: PML "Perfectly Matched Layer 1" on domains 1-4, 9-12 | ScalingType = Spherical

Geometry
  geom1 "Geometry 1" (3D, length unit m)
    sph1: Sphere | layername = Layer 1; layer = t_pml; r = radius_pml
    sph2: Sphere | layername = Layer 1; layer = t_pml; r = radius_pml
    blk1: Block | base = center; size = {Lx, Lx, Lx}
    blk2: Block | pos = {0, 0, block/2}; base = center; size = {block, block, block}
    int1: Intersection | input = blk2, sph1
    pt1: Point | p = {0, , 1[nm]}
    fin: Finalize "Form Union"

Materials
  mat1: Common "Material 1" on domains 1-12
    def "Basic"
      relpermittivity = eps_top
      relpermeability = 1
      electricconductivity = 0
  mat3: Common "Material 3" on domains 1, 3, 9, 11
    def "Basic"
      relpermittivity = eps_low
      relpermeability = 1
      electricconductivity = 0

Physics
  ewfd: ElectromagneticWavesFrequencyDomain "电磁波，频域" on all domains
    dependent variable E2 = {E2x, E2y, E2z}
    wee1: WaveEquationElectric "波动方程，电 1" (default)
    pec1: PerfectElectricConductor "理想电导体 1" (default)
    init1: init "初始值 1" (default)
    sctr1: Scattering "散射边界条件 1" on boundaries 5-8, 26, 27, 32, 37
    epd1: ElectricPointDipole "电点偶极子 1" on points 13 | enpI = {1, 1, 1}; normpI = current

Mesh
  mesh1 "Mesh 1"
    size: MeshSizeDefault | hmax = 1.4E-7; hmin = 2.52E-8; hcurve = 0.6; hnarrow = 0.5; hgrad = 1.5
    ftet1: FreeTet "Free Tetrahedral 1" on entire geometry | method = dellegacy52
      size1: Size on domains 1-4, 9-12 | hauto = 4
      size2: Size on domains 7, 8 | hauto = 1
      size3: Size on boundaries 14-18, 20-22, 39, 40 | hmax = 1E-8; hauto = 1; custom = on
      size4: Size on points 13 | hauto = 1
      size5: Size "大小 5" on boundaries 14-18, 20-22, 39, 40 | hauto = 2

Studies
  std1 "Study 1"
    freq: Frequency "Frequency Domain" | punit = Hz; plist = frequency

Solver configurations
  sol1 "解 1" (study std1)
    v1: Variables "因变量 1"
    s1: Stationary "稳态求解器 1"
      p1: Parametric "参数化 1" | pname = freq; plistarr = frequency; punit = Hz; pcontinuationmode = no
      fc1: FullyCoupled "全耦合 1" | linsolver = i1
      i1: Iterative "建议的迭代求解器 (ewfd)" | linsolver = bicgstab
        mg1: Multigrid "多重网格 1"

Datasets
  dset1: Solution | solution = sol1

Plots
  pg1: PlotGroup3D "电场 (ewfd)" | data = dset1
    mslc1: Multislice "多切面 1" | expr = ewfd.normE